# Worksheet setting: ORIGIN = 1
# Client name- Project name - ( Structure name)
# Hydrodynamic Coefficients Calculations-
# DNV-RP-H103 Simplified method
## Appendix I: Referenced coefficients for translational properties
# 1. Coefficients for Added mass calculation [Ref 1 Appendix A Table A-2]
# See tables in the Appendix A of Ref 1 for required added mass approximation formulae
## I. Introduction
# In this document the required hydrodynamic properties for conducting a deployment analysis for a 6-D Buoy structure are calculated using the simplified approach based on DNV RP H103 2012. The structure is presented as a rectangular box or a circular cylinder.
# Added mass coefficients for plate
# Added mass coefficients for cylinder
## II. Reference:
ratio_b2a ≡ [1.2; 2.5; 5; 9; ∞]
λ_2 ≡ [0.62; 0.78; 0.9; 0.96; 1]
# 1. DNV RP H 103 Modelling and Analysis of Marine Operations
# 2. Marine Hydrodynamics. Newman J.N. 1977
# 3. DWG of the structure
## III. Units and Constants
ORIGIN ≡ 1
ratio_1 := [1.0; 1.2; 1.25; 1.33; 1.5; 1.59; 2.0; 2.5; 3.0; 3.17; 4.0; 5.0; 6.25; 8.0; 10.0; ∞]
λ_1 := [0.579; 0.63; 0.642; 0.66; 0.69; 0.704; 0.757; 0.801; 0.83; 0.84; 0.872; 0.897; 0.917; 0.934; 0.947; 1.00]
Te := 1000*kg
ρ := 1.025*Te/m^3  # input  # results
## IV. Assumptions:
# 1. Notation:
# a is the shortest dimension in the plane perpendicular to flow direction
# b is the longest dimension in the plane, perpendicular to flow direction4
# c is the height of the structure (dimension along the flow direction)
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# In case of a cylinderical structure:
# in Z direction: a = b and equal to the diameter of the structure
# Notation a, b, and c are re-utilized for each flow direction
# 2. a, b - are the projected dimensions in case of inclined deployment
# 3. Drag coefficient for splash zone are taken as 3 times steady flow drag coefficients
# 4. Drag coefficients for deep zone are taken as equal to steady flow drag coefficients
# V. Glossary:
# Structure - a manifold, mudmat, suction pile, etc
## VI. Input
# 2. Steady flow Drag Coefficients  [Ref 1 Appendix B Table B-2]
# Version 2:
# Changed Ratio B/H from 11 to 50 at Cd 1.9
# Mass: | Drag coefficients for plates [Ref 1]: | Drag coefficients for prisms [Ref 1]:
# Mass of the structure in air:
M_box_air := 1.6226*Te
M_box_air = 1.6226 Te
# Cd >= 1 for prism
# Cd , based on c/sqrt(a*b)
# Mass of the structure in water:
M_box_sub := 0.2824*Te
M_box_sub = 0.2824 Te
# Volume:
ratio_BH := [1; 5; 10; 50; 100; 1000; 10000]
C_ds1 := [1.16; 1.2; 1.5; 1.9; 1.9; 1.9; 1.9]
ratio_LD := [1; 1.5; 2; 2.5; 3; 4; 5]
C_ds := [1.15; 0.97; 0.87; 0.9; 0.93; 0.95; 0.95]
# Volume of the structure:
Vol_box := (M_box_air - M_box_sub)/ρ
Vol_box = 1307.51 L
# Shape of the structure:
# 1 - rectangular
# 2 - circular
Shape := 1
# Dimensions:
# Length or diameter of the structure:
l_box := 3.045 m  # Axial Drag coefficients for Cylinders [Ref 1]:
# Width or Diameter of the structure:
w_box := 1.153*m
# Height of the structure:
ratio_cyl_axial_LD := [0; 1; 2; 4; 7]
C_ds_cyl_axial := [1.12; 0.91; 0.85; 0.87; 0.99]
h_box := 0.902 m
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# Normal Drag coefficients for Cylinders [Ref 1]:
# COG location:
# Distance from the geometrical center of the structure to COG of the structure:
x_box_cog := -0.0615 m = -0.0615 m
ratio_cyl_nor_LD := [2; 5; 10; 20; 40; 50; 100]
C_ds_cyl_nor := [0.8; 0.8; 0.82; 0.9; 0.98; 0.99; 1.0]
y_box_cog := 0.0 m = 0
z_box_cog := 0.141 m = 0.141 m
# Perforation effect in percent:
# (do not put % sign)
p_x := 0  # %
p_y := 0  # %
p_z := 0  # %
## VII. Calculation of Hydrodynamic Properties of 6D buoy :
## Appendix II: Referenced coefficients for rotational properties
# 1. Translational properties
# X-direction:
# 1. Coefficients for Added Inertia coefficient  calculation
# (From Newman 1977)
# a. Dimensions of the structure:
a := min(h_box, w_box)
b := max(w_box, h_box)
c := l_box
a = 0.902 m
b = 1.153 m
c = 3.045 m
# b. Added mass of the structure:
C_a_b := linterp(ratio_1, λ_1, b/a)
C_a_b = 0.648361
λ_0 := sqrt(a*b)/(c + sqrt(a*b))
λ_0 = 0.250887
C_a_c := linterp(ratio_b2a, λ_2, b/a)
C_a_c = 0.629633
ba_ratio := [0; 0.02; 0.1; 0.2; 0.3; 0.4; 0.5; 0.6; 0.7; 0.8; 0.9; 1.0; 1.1; 1.2; 1.3; 1.4; 1.5; 1.6]
m55_upper := [1; 0.99; 0.89; 0.7; 0.525; 0.37; 0.24; 0.15; 0.065; 0.03; 0.01; 0; 0.01; 0.025; 0.045; 0.075; 0.1; 0.125]
m55_lower := [0.21; 0.21; 0.205; 0.19; 0.155; 0.13; 0.1; 0.07; 0.045; 0.02; 0.005; 0; 0.005; 0.03; 0.055; 0.14; 0.225; 0.35]
M_add.b_x1 :=
    C_a_b*π/4*ρ*a^2*b*(1 + sqrt((1 - λ_0^2)/(2*(1 + λ_0^2)))) if Shape == 1
    C_a_c*ρ*π*h_box*(l_box/2)^2 otherwise
M_add.b_x1 = 0.814712 Te
# Reduction due to perforation:
M_add.b_x :=
    M_add.b_x1 if p_x ≤ 5
    M_add.b_x1*(0.7 + 0.3*cos(π*(p_x - 5)/34)) if 5 < p_x < 34
    M_add.b_x1*e^((10 - p_x)/28) if 34 ≤ p_x ≤ 50
X := ba_ratio
# fit curve for m55 Upper
Y_1(X) := -0.8958*X^6 + 5.1304*X^5 - 11.616*X^4 + 12.599*X^3 - 5.3891*X^2 + (-0.8306)*X + 1.0056
# fit curve for m55 Lower
Y_2(X) := -0.2602*X^6 + 1.3492*X^5 - 2.5645*X^4 + 2.6105*X^3 - 1.4314*X^2 + 0.086*X + 0.2094
# Added mass with perforation
M_add.b_x = 0.814712 Te
# c. Adjusted Ca coefficient of the structure:
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c_add.b_x := M_add.b_x/(ρ*Vol_box)
c_add.b_x = 0.607903
# d. Drag area of the structure:
DragArea_b_x := a*b*(1 - p_x/100)
DragArea_b_x = 1.04001 m^2
# e. Drag coefficient of the structure for steady flow:
C_D.deep.x :=
    if {
        Shape == 1
        c/sqrt(a*b) < 1
    }
        linterp(ratio_BH, C_ds1, b/a)
    if {
        Shape == 1
        c/sqrt(a*b) ≥ 1
    }
        linterp(ratio_LD, C_ds, c/sqrt(a*b))
    linterp(ratio_cyl_nor_LD, C_ds_cyl_nor, b/a) if Shape == 2
C_D.deep.x = 0.929152
# f. Drag coefficient of the structure for splash zone:
C_D.spl.x :=
    3*C_D.deep.x if 3*C_D.deep.x > 2.5
    2.5 otherwise
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C_D.spl.x = 2.78745
# Y-direction:
# a. Dimensions of the structure:
a := min(h_box, l_box)
b := max(l_box, h_box)
c := w_box
a = 0.902 m
b = 3.045 m
c = 1.153 m
# b. Added mass of the structure:
C_a_b := linterp(ratio_1, λ_1, b/a)
C_a_b = 0.847936
# Length to width ratio:
λ_0 := sqrt(a*b)/(c + sqrt(a*b))
λ_0 = 0.589721
C_a_c := linterp(ratio_b2a, λ_2, b/a)
C_a_c = 0.82204
M_add.b_y1 :=
    C_a_b*π/4*ρ*a^2*b*(1 + sqrt((1 - λ_0^2)/(2*(1 + λ_0^2)))) if Shape == 1
    C_a_c*ρ*π*(a/2)^2*b otherwise
# To change the header:
# 1. Go to View
# 2. Select Header and footer
# 3. Left corner change your  Client and project name e.i. Shell - Cardamom
# 4. Center Change structure name, e.i. HDM
# 5. Change prepared by and checked by rows with corresponding initials. Use a three letter abbreviation  e.i. Ayuna Alekseenko, AAL, Erika Bottino da Costa, EBC
# 6. Do a print Preview to make sure it looks right. Go to File, print preview.
# 7. Delete this note after completing the Header
M_add.b_y1 = 2.523 Te
# Effect of perforation:
M_add.b_y :=
    M_add.b_y1 if p_y ≤ 5
    M_add.b_y1*(0.7 + 0.3*cos(π*(p_y - 5)/34)) if 5 < p_y < 34
    M_add.b_y1*e^((10 - p_y)/28) if 34 ≤ p_y ≤ 50  # !!!SAVE AS the file in your project folder and rename!!!
# Note: To adjust the calculation sheet for the project:
# 1. Change the title
# 2. Input the drawing #, title,  particulars of the structure, e.i. dimensions and weight in input areas (highlighted in green)
# 3. Insert a drawing of the structure (snapshot)
# 4. Make sure the orientation the structure for every direction is correct, and the program uses the right dimesions, areas highlighted in teal.
# 5. Highlighted in Yellow are the results, the summary is presented at the end of the sheet.
# 6. Delete this note before issuing the document
# 7. Make sure it is the latest version of the spreadsheet
# 8. Avoid using spreadsheets from past projects as newer revision might be available
# Added mass with perforation
M_add.b_y = 2.523 Te
# c. Adjusted Ca coefficient of the structure:
c_add.b_y := M_add.b_y/(ρ*Vol_box)
c_add.b_y = 1.88255
# d. Drag area of the structure:
DragArea_b_y := a*b*(1 - p_y/100)
DragArea_b_y = 2.74659 m^2
# e. Drag coefficient of the structure for steady flow:
C_D.deep.y :=
    if {
        Shape == 1
        c/sqrt(a*b) < 1
    }
        linterp(ratio_BH, C_ds1, b/a)
    if {
        Shape == 1
        c/sqrt(a*b) > 1
    }
        linterp(ratio_LD, C_ds, c/sqrt(a*b))
    linterp(ratio_cyl_nor_LD, C_ds_cyl_nor, b/a) if Shape == 2
C_D.deep.y = 1.18376
# f. Drag coefficient of the structure for splash zone:
C_D.spl.y :=
    3*C_D.deep.y if 3*C_D.deep.y > 2.5
    2.5 otherwise
C_D.spl.y = 3.55127
## Z-direction
# a. Dimensions of the structure:
a := min(w_box, l_box)
b := max(l_box, w_box)
c := h_box
a = 1.153 m
b = 3.045 m
c = 0.902 m
# b. Added mass of the structure:
C_a_b := linterp(ratio_1, λ_1, b/a)
C_a_b = 0.809174
λ_0 := sqrt(a*b)/(c + sqrt(a*b))
λ_0 = 0.675041
M_add.b_z1 :=
    C_a_b*π/4*ρ*a^2*b*(1 + sqrt((1 - λ_0^2)/(2*(1 + λ_0^2)))) if Shape == 1
    ρ*2/π*4/3*π*(a/2)^3*(1 + sqrt((1 - λ_0^2)/(2*(1 + λ_0^2)))) otherwise
M_add.b_z1 = 3.77715 Te
# Effect of perforation:
M_add.b_z :=
    M_add.b_z1 if p_z ≤ 5
    M_add.b_z1*(0.7 + 0.3*cos(π*(p_z - 5)/34)) if 5 < p_z < 34
    M_add.b_z1*e^((10 - p_z)/28) if 34 ≤ p_z ≤ 50
# Added mass with perforation
M_add.b_z = 3.77715 Te
# c. Adjusted Ca coefficient of the structure:
c_add.b_z := M_add.b_z/(ρ*Vol_box)
c_add.b_z = 2.81835
# d. Drag area of the structure:
DragArea_b_z :=
    π*a^2/4*(1 - p_z/100) if Shape == 2
    a*b*(1 - p_z/100) otherwise
DragArea_b_z = 3.51089 m^2
# e. Drag coefficient of the structure for steady flow:
C_D.deep.z :=
    if {
        Shape == 1
        c/sqrt(a*b) < 1
    }
        linterp(ratio_BH, C_ds1, b/a)
    if {
        Shape == 1
        c/sqrt(a*b) > 1
    }
        linterp(ratio_LD, C_ds, c/sqrt(a*b))
    linterp(ratio_cyl_axial_LD, C_ds_cyl_axial, c/a) if Shape == 2
C_D.deep.z = 1.17641
# f. Drag coefficient of the structure for splash zone:
a := min(w_box, l_box)
C_D.spl.z :=
    3*C_D.deep.z if 3*C_D.deep.z > 2.5
    2.5 otherwise
C_D.spl.z = 3.52923
# 2. Mass moment of Inertia
# Mass Moment of Inertia
Ix :=
    M_box_air/12*(w_box^2 + h_box^2) + M_box_air*(y_box_cog^2 + z_box_cog^2) if Shape == 1
    M_box_air/12*(3*(w_box/2)^2 + h_box^2) + M_box_air*(y_box_cog^2 + z_box_cog^2) otherwise
Ix = 0.32203 m^2*Te
Iy :=
    M_box_air/12*(l_box^2 + h_box^2) + M_box_air*(x_box_cog^2 + z_box_cog^2) if Shape == 1
    M_box_air/12*(3*(l_box/2)^2 + h_box^2) + M_box_air*(x_box_cog^2 + z_box_cog^2) otherwise
Iy = 1.40214 m^2*Te
Iz :=
    M_box_air/12*(l_box^2 + w_box^2) + M_box_air*(y_box_cog^2 + x_box_cog^2) if Shape == 1
    M_box_air/2*(l_box/2)^2 + M_box_air*(y_box_cog^2 + x_box_cog^2) otherwise
Iz = 1.43963 m^2*Te
# 3. Rotatitional properties:
# a. Drag Moment of Area
# For splash zone
AM_spl.x :=
    (C_D.spl.y*l_box*h_box^4 + C_D.spl.z*l_box*w_box^4)/32 if Shape == 1
    C_D.spl.y*l_box*h_box^4/32 + C_D.spl.z*l_box^5/60 if Shape == 2
AM_spl.x = 0.817209 m^5
AM_spl.y :=
    (C_D.spl.x*w_box*h_box^4 + C_D.spl.z*w_box*l_box^4)/32 if Shape == 1
    C_D.spl.x*w_box*h_box^4/32 + C_D.spl.z*l_box^5/60 if Shape == 2
AM_spl.y = 10.9987 m^5
AM_spl.z := (C_D.spl.x*h_box*w_box^4 + C_D.spl.y*h_box*l_box^4)/32
AM_spl.z = 8.74464 m^5
# For deep zone
AM_d.x :=
    (C_D.deep.y*l_box*h_box^4 + C_D.deep.z*l_box*w_box^4)/32 if Shape == 1
    C_D.deep.y*l_box*h_box^4/32 + C_D.deep.z*l_box^5/60 otherwise
AM_d.x = 0.272403 m^5
AM_d.y :=
    (C_D.deep.x*w_box*h_box^4 + C_D.deep.z*w_box*l_box^4)/32 if Shape == 1
    C_D.deep.x*w_box*h_box^4/32 + C_D.deep.z*l_box^5/60 otherwise
AM_d.y = 3.66623 m^5
AM_d.z := (C_D.deep.x*h_box*w_box^4 + C_D.deep.y*h_box*l_box^4)/32
AM_d.z = 2.91488 m^5
# b. Drag Moment Coefficient
Cd_x := 1
Cd_y := 1
Cd_z := 1
# c. Hydrodynamic inertia:
δIx :=
    Vol_box*ρ*(w_box^2 + h_box^2)/12 if Shape == 1
    Vol_box*ρ*(3*w_box^2 + h_box^2)/12 otherwise
δIx = 0.239339 Te*m^2
δIy :=
    Vol_box*ρ*(l_box^2 + h_box^2)/12 if Shape == 1
    Vol_box*ρ*(3*l_box^2 + h_box^2)/12 otherwise
δIy = 1.1264 Te*m^2
δIz :=
    Vol_box*ρ*(l_box^2 + w_box^2)/12 if Shape == 1
    Vol_box*ρ/2*(l_box/2)^2 otherwise
δIz = 1.184 Te*m^2
# d. Added inertia coefficients Ca:
# X axis
# Dimensions in flow direction:
a_x := l_box/2 = 1.5225 m
b_x := sqrt(w_box*h_box/π) = 0.575364 m
# Ratio b/a
X_1 := b_x/a_x = 0.377908
X_2 := a_x/b_x = 2.64615
# Ca coefficient from Newman 1977
Ca_x :=
    Y_1(X_1) if X_1 < 1.6
    Y_2(X_2)*(2*b_x^3)/(a_x*(a_x^2 + b_x^2)) otherwise
Ca_x = 0.402061
# Y axis
# Dimensions in flow direction:
a_y := w_box/2 = 0.5765 m
b_y := sqrt(l_box*h_box/π) = 0.935022 m
# Ratio b/a
X_1 := b_y/a_y = 1.62189
X_2 := a_y/b_y = 0.616563
# Ca coefficient from Newman 1977
Ca_y :=
    Y_1(X_1) if X_1 < 1.6
    Y_2(X_2)*(2*b_y^3)/(a_y*(a_y^2 + b_y^2)) otherwise
Ca_y = 0.15385
# Z axis
# Dimensions in flow direction:
a_z := h_box/2 = 0.451 m
b_z := sqrt(l_box*w_box/π) = 1.05714 m
# Ratio b/a
X_1 := b_z/a_z = 2.344
X_2 := a_z/b_z = 0.426622
# Ca coefficient from Newman 1977
Ca_z :=
    Y_1(X_1) if X_1 < 1.6
    Y_2(X_2)*(2*b_z^3)/(a_z*(a_z^2 + b_z^2)) otherwise
Ca_z = 0.479155
# Y_1  and Y_2 functions that are fitted into the Newman's curves for added inertia. See Appendix II for details.
Added_mass := [M_add.b_x, M_add.b_y, M_add.b_z]
Drag_Area := [DragArea_b_x, DragArea_b_y, DragArea_b_z]
C_A := [c_add.b_x, c_add.b_y, c_add.b_z]
C_D.spl := [C_D.spl.x, C_D.spl.y, C_D.spl.z]
C_D.deep := [C_D.deep.x, C_D.deep.y, C_D.deep.z]
I := [Ix, Iy, Iz]
AM_spl := [AM_spl.x, AM_spl.y, AM_spl.z]
AM_d := [AM_d.x, AM_d.y, AM_d.z]
δI := [δIx, δIy, δIz]
Ca := [Ca_x, Ca_y, Ca_z]
Cd := [Cd_x, Cd_y, Cd_z]
## VIII. Results Summary for Orcaflex
# 1. Translational properties:
# X | Y | Z
# Drag area
Drag_Area = [1.04001, 2.74659, 3.51089] m^2
# Drag coefficients
# in splash zone
C_D.spl = [2.78745, 3.55127, 3.52923]
# in deep zone
C_D.deep = [0.929152, 1.18376, 1.17641]
# Added mass coefficient
C_A = [0.607903, 1.88255, 2.81835]
# Added mass
Added_mass = [0.814712, 2.523, 3.77715] Te
# Note: In Orcaflex,
# - leave Hydrodynamic Mass as "~"
# - leave Cm as "~"(it will automatically calculate Cm=Ca+1)
# 2. Inertia properties:
# Moment of inertia
I = [0.32203, 1.40214, 1.43963] Te
# Mass of structure
M_box_air = 1.6226 Te
# Volume of structure
Vol_box = 1.30751 m^3
# Note: In Orcaflex,
# - Center of mass is the distance from the origin of the buoy's drawing to COG of  the box.
# - Center of Volume is located at the middle of the height of the box with respect to the buoy's origin. See Orcaflex help for details.
# 3. Rotational properties:
# X | Y | Z
# Drag moment of Area
# in splash zone
AM_spl = [0.817209, 10.9987, 8.74464] m^5
# in deep zone
AM_d = [0.272403, 3.66623, 2.91488] m^5
# Drag moment coefficient
Cd = [1, 1, 1]
# Hydrodynamic inertia
δI = [0.239339, 1.1264, 1.184] Te*m^2
# Added inertia coefficent
Ca = [0.402061, 0.15385, 0.479155]
# Note:
# Specify a contact area and a friction factor for seabed contact in a "Contact" tab
